// COMSOL Multiphysics 5.5.0.359 model "Piezoelectric Multiphysics Simulation.mph"
// Outline of the model tree

Probes
  pdom1: DomainPoint "Domain Point Probe 1"
    first = {3.33983798186, 0.381489495464, 3}
    second = {3.33983798186, 0.381489495464, 0}
    coords = {3.339838, 0.38149, 3}
    ppb1: PointExpr "Point Probe Expression 1" | expr = es.fp1.V0; unit = V; descr = Floating potential; table = tbl1

Geometry
  geom1 "Geometry 1" (3D, length unit mm)
    cyl1: Cylinder | r = 27; h = 3
    fin: Finalize "Form Union"

Materials
  mat1: Common "Lead Zirconate Titanate (PZT-4)" on all domains
    def "Basic"
      relpermittivity = diag{762.5, 762.5, 663.2}
      density = 7500[kg/m^3]
    StrainCharge "Strain-charge form"
      sE = {1.23e-011[1/Pa], -4.05e-012[1/Pa], -5.31e-012[1/Pa], 0[1/Pa], 0[1/Pa], 0[1/Pa], -4.05e-012[1/Pa], 1.23e-011[1/Pa], -5.31e-012[1/Pa], 0[1/Pa], 0[1/Pa], 0[1/Pa], -5.31e-012[1/Pa], -5.31e-012[1/Pa], 1.55e-011[1/Pa], 0[1/Pa], 0[1/Pa], 0[1/Pa], 0[1/Pa], 0[1/Pa], 0[1/Pa], 3.9e-011[1/Pa], 0[1/Pa], 0[1/Pa], 0[1/Pa], 0[1/Pa], 0[1/Pa], 0[1/Pa], 3.9e-011[1/Pa], 0[1/Pa], 0[1/Pa], 0[1/Pa], 0[1/Pa], 0[1/Pa], 0[1/Pa], 3.27e-011[1/Pa]}
      dET = {0[C/N], 0[C/N], -1.23e-010[C/N], 0[C/N], 0[C/N], -1.23e-010[C/N], 0[C/N], 0[C/N], 2.89e-010[C/N], 0[C/N], 4.96e-010[C/N], 0[C/N], 4.96e-010[C/N], 0[C/N], 0[C/N], 0[C/N], 0[C/N], 0[C/N]}
      epsilonrT = diag{1475, 1475, 1300}
      eta_sE = {0, 0, 0, 0, 0, 0, 0, 0, 0, 0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}
      eta_dET = {0, 0, 0, 0, 0, 0, 0, 0, 0, 0, 0, 0, 0, 0, 0, 0, 0, 0}
      eta_epsilonT = 0
    StressCharge "Stress-charge form"
      cE = {1.38999e+011[Pa], 7.78366e+010[Pa], 7.42836e+010[Pa], 0[Pa], 0[Pa], 0[Pa], 7.78366e+010[Pa], 1.38999e+011[Pa], 7.42836e+010[Pa], 0[Pa], 0[Pa], 0[Pa], 7.42836e+010[Pa], 7.42836e+010[Pa], 1.15412e+011[Pa], 0[Pa], 0[Pa], 0[Pa], 0[Pa], 0[Pa], 0[Pa], 2.5641e+010[Pa], 0[Pa], 0[Pa], 0[Pa], 0[Pa], 0[Pa], 0[Pa], 2.5641e+010[Pa], 0[Pa], 0[Pa], 0[Pa], 0[Pa], 0[Pa], 0[Pa], 3.0581e+010[Pa]}
      eES = {0[C/m^2], 0[C/m^2], -5.20279[C/m^2], 0[C/m^2], 0[C/m^2], -5.20279[C/m^2], 0[C/m^2], 0[C/m^2], 15.0804[C/m^2], 0[C/m^2], 12.7179[C/m^2], 0[C/m^2], 12.7179[C/m^2], 0[C/m^2], 0[C/m^2], 0[C/m^2], 0[C/m^2], 0[C/m^2]}
      epsilonrS = diag{762.5, 762.5, 663.2}
      eta_cE = {0, 0, 0, 0, 0, 0, 0, 0, 0, 0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}
      eta_eES = {0, 0, 0, 0, 0, 0, 0, 0, 0, 0, 0, 0, 0, 0, 0, 0, 0, 0}
      eta_epsilonS = 0

Physics
  es: Electrostatics on all domains
    dependent variable V
    ccn1: ChargeConservation (default)
    zc1: ZeroCharge (default)
    init1: init "Initial Values 1" (default)
    ccnp1: ChargeConservationPiezo "Charge Conservation, Piezoelectric 1" on all domains
    gnd1: Ground on boundaries 3
    fp1: FloatingPotential on boundaries 4
  solid: SolidMechanics on all domains
    dependent variable u = {u, v, w}
    lemm1: LinearElasticModel "Linear Elastic Material 1" (default)
    free1: Free (default)
    init1: init "Initial Values 1" (default)
    pzm1: PiezoelectricMaterialModel "Piezoelectric Material 1" on all domains
    fix1: Fixed "Fixed Constraint 1" on boundaries 3
    bndl1: BoundaryLoad on boundaries 4 | LoadType = TotalForce; Ftot = {0, 0, -10}

Multiphysics
  pze1: PiezoelectricEffect on all domains | Solid_physics = solid; Electrostatics_physics = es

Mesh
  mesh1 "Mesh 1" (physics-controlled)

Studies
  std1 "Study 1"
    stat: Stationary

Solver configurations
  sol1 "Solution 1" (study std1)
    v1: Variables "Dependent Variables 1"
    s1: Stationary "Stationary Solver 1"
      fc1: FullyCoupled | linsolver = d1
      d1: Direct "Suggested Direct Solver (pze1) (merged)"

Datasets
  dset1: Solution | solution = sol1
  dset2: Solution "Probe Solution 2" | solution = sol1
  cpt1: CutPoint3D "Domain Point Probe 1" | data = dset2; pointx = 3.339838; pointy = 0.38149; pointz = 3

Derived values
  pev1: EvalPoint "Point Probe Expression 1" | data = cpt1; table = tbl1; expr = es.fp1.V0

Tables
  tbl1: Table "Probe Table 1"
    Floating potential (V), Point: (3.3398, 0.38149, 3)
    -0.241593

Plots
  pg1: PlotGroup3D "Electric Potential (es)" | data = dset1
    mslc1: Multislice | expr = V
  pg2: PlotGroup3D "Stress (solid)" | data = dset1
    surf1: Surface | expr = solid.mises
      def: Deform "Deformation" | expr = {u, v, w}; descr = Displacement field
  pg3: PlotGroup3D "Boundary Loads (solid)" | data = dset1; typeintitle = off; descriptionintitle = off; unitintitle = off
    arws1: ArrowSurface "Boundary Load 1" | expr = {solid.bndl1.F_Ax, solid.bndl1.F_Ay, solid.bndl1.F_Az}
      col: Color "Color Expression" | expr = comp1.solid.bndl1.F_A_Mag
      def: Deform "Deformation" | expr = {u, v, w}; descr = Displacement field
    surf1: Surface "Gray Surfaces" (disabled) | expr = 1
      def: Deform "Deformation" | expr = {u, v, w}; descr = Displacement field
  pg4: PlotGroup1D "Probe Plot Group 4"
    tblp1: Table "Probe Table Graph 1" | table = tbl1